// COMSOL Multiphysics 6.2.0.415 model "AdaptiveMesh_SingleConductor_2D_Rect.mph"
// Outline of the model tree

Parameters
  sigma_cu = 5.998e7 [S/m]
  mu0 = 4*pi*1e-7 [H/m]
  w_original_dim = 3.81e-4 [m]  // Original dim
  t_original_dim = 3.556e-5 [m]  // Original dim
  a = 3e-3 [m]
  b = 2e-3 [m]

Variables
  var1 "Variables 1"
    skin_depth = sqrt(1/(sigma_cu*pi*freq*mu0))

Geometry
  geom1 "Geometry 1" (2D, length unit m)
    r1: Rectangle "Central Conductor" | base = center; size = {w_original_dim, t_original_dim}
    c1: Circle | r = 0.1
    r2: Rectangle "Right Conductor" (disabled) | pos = {3e-3, 0}; base = center; size = {3.81e-4, 3.556e-5}
    r3: Rectangle "Left Conductor" (disabled) | pos = {-3e-3, 0}; base = center; size = {3.81e-4, 3.556e-5}
    fin: Finalize "Form Union"

Materials
  mat1: Common "Air" on domains 1
    def "Basic"
      thermalexpansioncoefficient = alpha_p(pA,T)
      molarmass = 0.02897[kg/mol]
      bulkviscosity = muB(T)
      relpermeability = 1
      relpermittivity = 1
      dynamicviscosity = eta(T)
      ratioofspecificheat = 1.4
      electricconductivity = 0[S/m]
      heatcapacity = Cp(T)
      density = rho(pA,T)
      thermalconductivity = k(T)
      soundspeed = cs(T)
      eta: Piecewise | arg = T; pieces = {200.0, 1600.0, -8.38278E-7+8.35717342E-8*T^1-7.69429583E-11*T^2+4.6437266E-14*T^3-1.06585607E-17*T^4}; argunit = K; fununit = Pa*s
      Cp: Piecewise | arg = T; pieces = {200.0, 1600.0, 1047.63657-0.372589265*T^1+9.45304214E-4*T^2-6.02409443E-7*T^3+1.2858961E-10*T^4}; argunit = K; fununit = J/(kg*K)
      rho: Analytic | expr = pA*0.02897/R_const[K*mol/J]/T; args = {pA, T}; fununit = kg/m^3; argunit = {Pa, K}
      k: Piecewise | arg = T; pieces = {200.0, 1600.0, -0.00227583562+1.15480022E-4*T^1-7.90252856E-8*T^2+4.11702505E-11*T^3-7.43864331E-15*T^4}; argunit = K; fununit = W/(m*K)
      cs: Analytic | expr = sqrt(1.4*R_const[K*mol/J]/0.02897*T); args = T; fununit = m/s; argunit = K
      an1: Analytic | funcname = alpha_p; expr = -1/rho(pA,T)*d(rho(pA,T),T); args = {pA, T}; fununit = 1/K; argunit = {Pa, K}
      an2: Analytic "Analytic 2a" | funcname = muB; expr = 0.6*eta(T); args = T; fununit = Pa*s; argunit = K
    RefractiveIndex
      n = 1
      ki = 0
    NonlinearModel
      BA = def.gamma-1
    idealGas
      Rs = R_const/Mn
      heatcapacity = Cp(T)
      ratioofspecificheat = 1.4
      molarmass = 0.02897[kg/mol]
      Cp: Piecewise | arg = T; pieces = {200.0, 1600.0, 1047.63657-0.372589265*T^1+9.45304214E-4*T^2-6.02409443E-7*T^3+1.2858961E-10*T^4}; argunit = K; fununit = J/(kg*K)
  mat3: Common "Copper" on domains 2
    def "Basic"
      relpermeability = 1
      electricconductivity = 5.8e7[S/m]
      thermalexpansioncoefficient = 17e-6[1/K]
      heatcapacity = 385[J/(kg*K)]
      relpermittivity = 1
      density = 8960[kg/m^3]
      thermalconductivity = 400[W/(m*K)]
    Enu "Young's modulus and Poisson's ratio"
      E = 110[GPa]
      nu = 0.35
    linzRes "Linearized resistivity"
      rho0 = 1.72e-8[ohm*m]
      alpha = 0.0039[1/K]
      Tref = 298[K]

Physics
  mf: InductionCurrents "Magnetic Fields" on all domains
    dependent variable A = {Ax, Ay, Az}
    EquationForm.form = Frequency
    EquationForm.freq_src = fromSolver
    fsp1: FreeSpace (default)
    mi1: MagneticInsulation (default)
    init1: init "Initial Values 1" (default)
    coil1: Coil "Central Conductor" on domains 2
      CoilExcitation = Current
      CoilName = 1
      ICoil = 1 [A]
      VCoil = 1
      materialType = from_mat
      loss1: LossCalculation on all domains
    coil2: Coil "Right Conductor" (disabled) on no domains
      CoilExcitation = Voltage
      CoilName = 2
      ICoil = 1[A]
      VCoil = 1[V]
      materialType = from_mat
      loss1: LossCalculation on all domains
    coil3: Coil "Left Conductor" (disabled) on no domains
      CoilExcitation = Voltage
      CoilName = 3
      ICoil = 1.2[A]
      VCoil = 1.2[V]
      materialType = from_mat
      loss1: LossCalculation on all domains

Mesh
  mesh1 "Mesh 1"
    size: MeshSizeDefault | hmax = 0.001; hmin = 4.0E-7; hauto = 1; custom = on
    sca1: Scale on domains 1 | scale = 2
    ftri1: FreeTri "Free Triangular 1" on remaining entities | smoothmaxiter = 4; smoothmaxdepth = 4
    ref1: Refine on domains 2 | numrefine = 5
    bl1: BndLayer "Boundary Layers 1" on all domains
      blp: BndLayerProp "Boundary Layer Properties" on all boundaries
        blnlayers = 10
        inittype = blhtot
        blhmin = skin_depth
        blhtot = 2.5e-6

Studies
  std1 "Study 1"
    freq: Frequency "Frequency Domain" | plist = 10^{range(log10(1),1/5,log10(1000000000))}

Solver configurations
  sol1 "Solution 1" (study std1)
    v1: Variables "Dependent Variables 1"
    s1: Stationary "Stationary Solver 1" | linpmethod = sol
      dDef: Direct
      p1: Parametric
        pname = freq
        plistarr = 10^{range(log10(1),1/5,log10(1000000000))}
        punit = Hz
        pcontinuationmode = no
      fc1: FullyCoupled | linsolver = dDef

Datasets
  dset1: Solution | solution = sol1
  cln1: CutLine2D "H_Above" | data = dset1; genpoints = {{-25e-3, 5e-3}, {25e-3, 5e-3}}
  cln2: CutLine2D "H_Below" | data = dset1; genpoints = {{-25e-3, -5e-3}, {25e-3, -5e-3}}
  cln3: CutLine2D "V_Left" | data = dset1; genpoints = {{-22.5e-3, -20e-3}, {-22.5e-3, +20e-3}}
  cln4: CutLine2D "V_Right" | data = dset1; genpoints = {{22.5e-3, -20e-3}, {22.5e-3, +20e-3}}

Derived values
  int1: IntSurface "Total Current" on all domains
    data = dset1
    table = new
    expr = mf.normJ
    unit = A
    descr = Current density norm
  int3: IntSurface "Total Losses" on all domains
    data = dset1
    table = new
    expr = mf.Qrh
    unit = W/m
    descr = Volumetric loss density, electric

Plots
  pg1: PlotGroup2D "Magnetic Flux Density Norm (mf)" | data = dset1
    surf1: Surface "Magnetic Flux Density Norm" | expr = mf.normB
    str1: Streamline on boundaries 1-8 | expr = {mf.Bx, mf.By}; udist = 0.03
      col1: Color "Color Expression 1" | expr = mf.normB
      filt1: Filter | expr = !isScalingSystemDomain
    con1: Contour | expr = mf.Az; levelrounding = off
      filt1: Filter | expr = !isScalingSystemDomain
  pg2: PlotGroup2D "Current density norm" | data = dset1
    surf1: Surface "Current density norm" | data = dset1; expr = mf.normJ; descr = Current density norm
  pg3: PlotGroup2D "Volumetric loss density - electromagnetic" | data = dset1
    surf1: Surface "Volumetric loss density - electromagnetic"
      expr = mf.Qh
      descr = Volumetric loss density, electromagnetic
  pg4: PlotGroup1D "H_Above" | data = dset1
    lngr1: LineGraph "H_Above_B" | data = cln1; expr = mf.normB; descr = Magnetic flux density norm
    lngr2: LineGraph "H_Above_Bx" | data = cln1; expr = mf.Bx
    lngr3: LineGraph "H_Above_By" | data = cln1; expr = mf.By
  pg5: PlotGroup1D "H_Below" | data = cln2
    lngr1: LineGraph "H_Below" | data = cln2; expr = mf.normB
  pg6: PlotGroup1D "V_Left" | data = cln3
    lngr1: LineGraph "V_Left" | data = cln3; expr = mf.normB
  pg7: PlotGroup1D "V_Right" | data = cln4
    lngr1: LineGraph "V_Right" | data = cln4; expr = mf.normB